# OpenSim document version 40600
ForceSet:
  # Sacrum 6-DOF (residuals)
  CoordinateActuator sacrum_pitch_residual: coordinate=sacrum_pitch optimal_force=1.5
  CoordinateActuator sacrum_roll_residual: coordinate=sacrum_roll optimal_force=1.5
  CoordinateActuator sacrum_yaw_residual: coordinate=sacrum_yaw optimal_force=1.5
  CoordinateActuator sacrum_x_residual: coordinate=sacrum_x optimal_force=10
  CoordinateActuator sacrum_y_residual: coordinate=sacrum_y optimal_force=10
  CoordinateActuator sacrum_z_residual: coordinate=sacrum_z optimal_force=10
  # Sacroiliac (locked but need reserves for completeness)
  # Right hip (3 DOF)
  CoordinateActuator hip_r_flx_reserve: coordinate=hip_r_flx optimal_force=0.1
  CoordinateActuator hip_r_add_reserve: coordinate=hip_r_add optimal_force=0.1
  CoordinateActuator hip_r_int_reserve: coordinate=hip_r_int optimal_force=0.1
  # Right knee (1 DOF)
  CoordinateActuator knee_r_flx_reserve: coordinate=knee_r_flx optimal_force=0.1
  # Right ankle (3 DOF — flx active, add+int locked)
  CoordinateActuator ankle_r_flx_reserve: coordinate=ankle_r_flx optimal_force=0.1
  # Left hip (3 DOF)
  CoordinateActuator hip_l_flx_reserve: coordinate=hip_l_flx optimal_force=0.1
  CoordinateActuator hip_l_add_reserve: coordinate=hip_l_add optimal_force=0.1
  CoordinateActuator hip_l_int_reserve: coordinate=hip_l_int optimal_force=0.1
  # Left knee (1 DOF)
  CoordinateActuator knee_l_flx_reserve: coordinate=knee_l_flx optimal_force=0.1
  # Left ankle (3 DOF — flx active, add+int locked)
  CoordinateActuator ankle_l_flx_reserve: coordinate=ankle_l_flx optimal_force=0.1
